# bulk water

units           metal
boundary        p p p
atom_style      charge

newton off
kspace_style pppm 0.000001
neigh_modify one 10000

read_data	system.data
mass 		1 16
mass		2 1
mass            3 23
mass            4 35


dielectric 50

velocity        all create 300.0 23456789

pair_style coul/long  20.0
pair_coeff * *

thermo_style    custom step pe ke etotal temp press vol
thermo          1
dump		1 all custom 1 LiBr-R2SCAN-COalt.lammpstrj id element xu yu zu
dump 		2 all custom 1 LiBr-R2SCAN-COalt-frc.lammpstrj id element fx fy fz
dump_modify     1 element O H Li Br
dump_modify     2 element O H Li Br


rerun /scratch/tn51/ttd110/CP2K/LiBr-2p4M-R2SCAN/LiBr-2p4M-DCR2SCAN-reftraj/LiBr-DCR2SCAN-reftraj-pos-1-full.xyz  dump x y z box no format xyz
